Flatplate
!Mach
 0.0
!IYsym   IZsym   Zsym
 1       0       0.0
!Sref    Cref    Bref
2        0.5     4
!Xref    Yref    Zref
0.25    0.0     0.0
!
SURFACE
WING
!Nchordwise  Space
 8           1.0
YDUPLICATE
0

SECTION
!Xle    Yle    Zle     Chord   Ainc  Nspanwise  Space
0.000   0.000  0.000   0.5     1.    10         1.0
NACA
0012
SECTION
!Xle    Yle    Zle     Chord   Ainc  Nspanwise  Space
0.000   2.00   0.000   0.5     1.    10         1.0
NACA
0012
